OpenVSP model (file version 5), 2 components.
Geometry view with OpenVSP parameter names; values to 6 digits, angles in degrees, lengths in the model's unit.
Overall bounding box: X_Min=-0.199956 X_Len=400.2 Y_Min=-1000 Y_Len=2000 Z_Min=-16.7714 Z_Len=62.257

Wing "WingGeom"
  location (X Y Z) 0 0 0, rotation 0 0 0
  symmetric about XZ
  bounding box size 400.2 2000 62.257
  totals: TotalSpan=2000 TotalProjectedSpan=2000 TotalChord=400 TotalArea=800000 TotalAR=5 MAC=400
  root: chord 400, twist 0, NACA 4-series Camber=0.04 CamberLoc=0.4 ThickChord=0.15
  sections:
    n  Span  Root_Chord  Tip_Chord  Area    Sweep  Sweep_Location  Dihedral  Twist  Twist_Location  tip airfoil
    1  1000  400         400        400000  0      0               0         0      0.25            as above

Mesh "MeshGeom"
  location (X Y Z) 0 0 0, rotation 0 0 0
  bounding box size 400 2000 61.9164
  triangle mesh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

VSPAERO settings: Sref=800000 bref=2000 cref=400 Xcg=0 Ycg=0 Zcg=0 AlphaStart=-4 AlphaEnd=16 AlphaNpts=20 BetaStart=0 BetaEnd=0 BetaNpts=1 MachStart=0.117647 MachEnd=0 MachNpts=1 ReCref=1.01841e+06 Vinf=100 Rho=0.002377
